netefi("info") = "netefi: 32-bit, 0.2.7694.41781, 24-янв-2021 23:12:42"
netefi("author") = "Viacheslav N. Mezentsev"
netefi("list") = "cstools"
cstools("list") = "csimplot2d, cstools"
cstools("info") = "cstools: 0.1.7694.41782"
implicitplot2d(f, coords, grids) :=
    [nx, ny] ← transpose(grids)
    [xmax, ymax; xmin, ymin] ← coords
    [Δx, Δy] ← [(xmax - xmin)/nx, (ymax - ymin)/ny]
    zvalues[nx, ny] ← 0
    for n ∈ 0 .. nx
        for m ∈ 0 .. ny
            zvalues[n, m] ← f(xmin + n*Δx, ymin + m*Δy)
    return csimplot2d(Δx, Δy, xmin, ymin, zvalues)
xmin := -2
ymin := -2
xmax := 2
ymax := 2
[nx, ny] := [200, 200]
coords := [xmax, ymax; xmin, ymin]
grids := transpose([nx, ny])
start := time(0)
f(x, y) := x^2 - y*x + y^2 - 1
S1 := implicitplot2d(f, coords, grids)
f(x, y) := sin(5*x^2) + sin(4*y^2)
S2 := implicitplot2d(f, coords, grids)
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time(0) - start = 0.479
