netefi("info") = "netefi: 64-bit, 0.2.9246.22184, 25-апр-2025 12:19:28"
netefi("author") = "Viacheslav N. Mezentsev"
netefi("list") = "cpptest, cstest, cstools, vbtest"
cstools("list") = "csimplot2d, cstools"
cstools("info") = "cstools: 0.1.9246.22185"
implicitplot2d(f, coords, grids) :=
    [nx, ny] ← transpose(grids)
    [xmax, ymax; xmin, ymin] ← coords
    [Δx, Δy] ← [(xmax - xmin)/nx, (ymax - ymin)/ny]
    zvalues[nx, ny] ← 0
    for n ∈ 0 .. nx
        for m ∈ 0 .. ny
            zvalues[n, m] ← f(xmin + n*Δx, ymin + m*Δy)
    return csimplot2d(Δx, Δy, xmin, ymin, zvalues)
xmin := -2
ymin := -2
xmax := 2
ymax := 2
[nx, ny] := [200, 200]
coords := [xmax, ymax; xmin, ymin]
grids := transpose([nx, ny])
start := time(0)
f(x, y) := (x^2 + y^2 - 1)^3 - x^2*y^3
S1 := implicitplot2d(f, coords, grids)
f(x, y) := sin(5*x^2) + sin(4*y^2)
S2 := implicitplot2d(f, coords, grids)
# [plot: S1[:, 1], S2[:, 1] vs S1[:, 0], S2[:, 0]]
time(0) - start = 0.4
