netefi("info") = "netefi: 64-bit, 0.4.9366.42267, 23-авг-2025 23:28:54"
netefi("list") = "cpptest, cstest, cstools, vbtest"
netefi("author") = "Viacheslav N. Mezentsev"
netefi("email") = "viacheslavmezentsev@ya.ru"
cstest("info") = "cstest: 1.0.9366.41787"
cstest("list") = "csdec, csrfile, csenc, csmix, cserror, cssum, cstable, cstest, cstest1, cstest2, cstest3, csecho, cstranspose"
vbtest("info") = "vbtest: 1.0.9366.41789"
vbtest("list") = "vbrfile, vbecho, vberror, vbsum, vbtest, vbtest1, vbtest2, vbtest3"
cpptest("info") = "cpptest: 1.0.9366.41788"
cpptest("list") = "cpptest, cppecho, cppsum, cpperror"
cppecho("echo") = "echo"
cppsum(10, 2i) = 10 + 2i
cpperror(2) =  # error: Пользовательская ошибка: {0}
cstest1(1 + 5i) = 2 + 10i
vbtest1(2 + 4i) = 4 + 8i
cstest3(3, 4) = [0, 1i, 2i, 3i; 1, 1 + 1i, 1 + 2i, 1 + 3i; 2, 2 + 1i, 2 + 2i, 2 + 3i]
vbtest3(4, 1) = [0; 1; 2; 3]
str1 := cstest2(" привет ", stack(1, 2))
str2 := vbtest2(" = ", stack(1, 1))
str1 = "(1, 0) ?@825B (2, 0)"
str2 = "(1, 0) = (1, 0)"
csecho("echo") = "echo"
cserror(3) =  # error
cstranspose(stack(1, 2)) = [1, 2]
vbsum(10, 14i) = 10 + 14i
vbecho("echo") = "echo"
cppecho(concat("1234567890", "qwerty")) = "1234567890qwerty"
vberror(1) =  # error
