netefi("info") = "netefi: 64-bit, 0.2.7694.43189, 24-янв-2021 23:59:38"
netefi("list") = "capture, cpptest, cstest, cstools, vbtest"
netefi("author") = "Viacheslav N. Mezentsev"
netefi("email") = "viacheslavmezentsev@ya.ru"
cstest("info") = "cstest: 1.0.7694.43196"
cstest("list") = "csdec, csrfile, csenc, csmix, cserror, cssum, cstable, cstest, cstest1, cstest2, cstest3, csecho, cstranspose"
vbtest("info") = "vbtest: 1.0.7694.43196"
vbtest("list") = "vberror, vbrfile, vbecho, vbsum, vbtest, vbtest1, vbtest2, vbtest3"
cpptest("info") = "cpptest: 1.0.7694.43177"
cpptest("list") = "cpptest, cppecho, cppsum, cpperror"
cppecho("echo") = "echo"
cppsum(10, 2i) = 10 + 2i
cpperror(2) =  # error: Неизвестная ошибка: cserror:_text_example_2.
cstest1(1 + 5i) = 2 + 10i
vbtest1(2 + 4i) = 4 + 8i
cstest3(3, 4) = [0, 1i, 2i, 3i; 1, 1 + 1i, 1 + 2i, 1 + 3i; 2, 2 + 1i, 2 + 2i, 2 + 3i]
vbtest3(4, 1) = [0; 1; 2; 3]
str1 := cstest2(" привет ", stack(1, 2))
str2 := vbtest2(" = ", stack(1, 1))
str1 = "1 + 0 * i ?@825B 2 + 0 * i"
str2 = "1 + 0 * i = 1 + 0 * i"
csecho("echo") = "echo"
cserror(3) =  # error: Неизвестная ошибка: vberror:_text_example_3.
cstranspose(stack(1, 2)) = [1, 2]
vbsum(10, 14i) = 10 + 14i
vbecho("echo") = "echo"
cppecho(concat("1234567890", "qwerty")) = "1234567890qwerty"
vberror(4) =  # error: Произошла внутренняя ошибка. Сохраните свою работу и перезапустите приложение.
