M := capture(0)
rows(M) =  # no stored result
cols(M) =  # no stored result
w := cols(M)/3
R := submatrix(M, 0, rows(M) - 1, 0, w - 1)
G := submatrix(M, 0, rows(M) - 1, w, 2*w - 1)
B := submatrix(M, 0, rows(M) - 1, 2*w, 3*w - 1)
# [component: inputs M]
# [component: inputs (R, G, B)]
